// SBML level 3 version 1

model AutoRegulatoryNetwork()
  // Auto-regulatory network (altered version)
  // model units - substance: item, time: second, volume: litre, extent: item

  // Compartments:
  compartment Cell;

  // Species:
  substanceOnly species Gene in Cell = 10;
  substanceOnly species P2Gene in Cell = 0; P2Gene is "P2.Gene";
  substanceOnly species Rna in Cell = 0;
  substanceOnly species P in Cell = 0;
  substanceOnly species P2 in Cell = 0;

  // Reactions:
  RepressionBinding: Gene + P2 => P2Gene; k1*Gene*P2; RepressionBinding is "Repression binding";
    k1 = 1;
  ReverseRepressionBinding: P2Gene => Gene + P2; k1r*P2Gene; ReverseRepressionBinding is "Reverse repression binding";
    k1r = 10;
  Transcription: Gene => Gene + Rna; k2*Gene;
    k2 = 0.02;
  Translation: Rna => Rna + P; k3*Rna;
    k3 = 10;
  Dimerisation: 2 P => P2; k4*0.5*P*(P - 1);
    k4 = 1;
  Dissociation: P2 => 2 P; k4r*P2;
    k4r = 1;
  RnaDegradation: Rna => ; k5*Rna; RnaDegradation is "RNA Degradation";
    k5 = 0.1;
  ProteinDegradation: P => ; k6*P; ProteinDegradation is "Protein degradation";
    k6 = 0.01;
end
