// SBML level 3 version 1

model lacOperon()
  // lac operon model (stochastic)
  // model units - substance: item, time: second, volume: litre, extent: item

  // Compartments:
  compartment Cell = 1e-15;

  // Species:
  substanceOnly species Idna in Cell = 1;
  substanceOnly species Irna in Cell = 0;
  substanceOnly species I in Cell = 50;
  substanceOnly species Op in Cell = 1;
  substanceOnly species Rnap in Cell = 100;
  substanceOnly species Rna in Cell = 0;
  substanceOnly species Z in Cell = 0;
  substanceOnly species Lactose in Cell = 20;
  substanceOnly species ILactose in Cell = 0;
  substanceOnly species IOp in Cell = 0;
  substanceOnly species RnapOp in Cell = 0;

  // Reactions:
  InhibitorTranscription: Idna => Idna + Irna; c1*Idna;
    c1 = 0.02;
  InhibitorTranslation: Irna => Irna + I; c2*Irna;
    c2 = 0.1;
  LactoseInhibitorBinding: I + Lactose => ILactose; c3*I*Lactose;
    c3 = 0.005;
  LactoseInhibitorDissociation: ILactose => I + Lactose; c4*ILactose;
    c4 = 0.1;
  InhibitorBinding: I + Op => IOp; c5*I*Op;
    c5 = 1;
  InhibitorDissociation: IOp => I + Op; c6*IOp;
    c6 = 0.01;
  RnapBinding: Op + Rnap => RnapOp; c7*Op*Rnap;
    c7 = 0.1;
  RnapDissociation: RnapOp => Op + Rnap; c8*RnapOp;
    c8 = 0.01;
  Transcription: RnapOp => Op + Rnap + Rna; c9*RnapOp;
    c9 = 0.03;
  Translation: Rna => Rna + Z; c10*Rna;
    c10 = 0.1;
  Conversion: Lactose + Z => Z; c11*Lactose*Z;
    c11 = 1e-5;
  InhibitorRnaDegradation: Irna => ; c12*Irna;
    c12 = 0.01;
  InhibitorDegradation: I => ; InhibitorDegradation_c13*I;
    InhibitorDegradation_c13 = 0.002;
  LactoseInhibitorDegradation: ILactose => Lactose; LactoseInhibitorDegradation_c13*ILactose;
    LactoseInhibitorDegradation_c13 = 0.002;
  RnaDegradation: Rna => ; c14*Rna;
    c14 = 0.01;
  ZDegradation: Z => ; c15*Z;
    c15 = 0.001;

  // Events:
  Intervention: at (time >= 20000): Lactose = Lactose + 10000;
end
